// SBML level 2 version 4

model Equalizer()
  // Equalizer

  // Compartments:
  compartment Cell = 4e-12 MWBUILTINUNIT_liter;

  // Species:
  substanceOnly species mRNAmiRNA in Cell = 0;  // substance in MWBUILTINUNIT_molecule
  substanceOnly species gene_on in Cell = 0;  // substance in MWBUILTINUNIT_molecule
  substanceOnly species TetR in Cell = 0;  // substance in MWBUILTINUNIT_molecule
  substanceOnly species pri_miRNA in Cell = 0;  // substance in MWBUILTINUNIT_molecule
  substanceOnly species pre_miRNA in Cell = 0;  // substance in MWBUILTINUNIT_molecule
  substanceOnly species mRNA in Cell = 0;  // substance in MWBUILTINUNIT_molecule
  substanceOnly species POI in Cell = 0;  // substance in MWBUILTINUNIT_molecule
  substanceOnly species miRNA in Cell = 0;  // substance in MWBUILTINUNIT_molecule
  substanceOnly species microRNA_RISC in Cell = 0;  // substance in MWBUILTINUNIT_molecule
  substanceOnly species Inducer in Cell = 234;  // substance in MWBUILTINUNIT_molecule
  substanceOnly species Inducer_TetR in Cell = 0;  // substance in MWBUILTINUNIT_molecule
  substanceOnly species mRNA_miRNA_RISC in Cell = 0;  // substance in MWBUILTINUNIT_molecule
  substanceOnly species gene_off in Cell = 10;  // substance in MWBUILTINUNIT_molecule
  substanceOnly species RISC in Cell = 170000;  // substance in MWBUILTINUNIT_molecule

  // Parameters:
  k_transcription = 0.0467 MWDERIVEDUNIT_1__second;
  n = 4 dimensionless;
  theta = 183 MWBUILTINUNIT_molecule;
  thresh = 250 MWBUILTINUNIT_molecule;
  leakage = 0.25 dimensionless;

  // Reactions:
  // k_transcription = 0.0467*4/5
  transcription: gene_on => mRNAmiRNA + gene_on; k_transcription*gene_on*(theta^4/(theta^4 + TetR^4) + leakage)/(1 + leakage);
  splicing: mRNAmiRNA => mRNA + pri_miRNA; kf_splicing*mRNAmiRNA;
    kf_splicing = 0.002 MWDERIVEDUNIT_1__second;
  translation: mRNA => POI + TetR + mRNA; kf_translation*mRNA;
    kf_translation = 0.0003333 MWDERIVEDUNIT_1__second;
  drosha: pri_miRNA => pre_miRNA; kf_drosha*pri_miRNA;
    kf_drosha = 0.01 MWDERIVEDUNIT_1__second;
  dicer: pre_miRNA => miRNA; kf_dicer*pre_miRNA;
    kf_dicer = 0.001 MWDERIVEDUNIT_1__second;
  miRNA_bind_RISC: miRNA + RISC => microRNA_RISC; kf_miRNA_bind_RISC*miRNA*RISC;
    kf_miRNA_bind_RISC = 1e-5 MWDERIVEDUNIT_1__molecule_second;
  miRNA_deg: miRNA => ; kf_miRNA_deg*miRNA;
    kf_miRNA_deg = 0.000288 MWDERIVEDUNIT_1__second;
  POI_deg: POI => ; kf_POI_deg*POI;
    kf_POI_deg = 9.67e-5 MWDERIVEDUNIT_1__second;
  // In Nevozhay(2009), a kf of 3.6nM^(-1)*h^(-1) is used,here unit conversion was done by assuming a nucleus volume of 690 um^3, and the conversion is also multiplied by 690/4000 since only this portion of the inducer is located within the nucleus.
  Inducer_bind_TetR: TetR + Inducer => Inducer_TetR; kf_Inducer_bindTetR*TetR*Inducer;
    kf_Inducer_bindTetR = 1e-5 MWDERIVEDUNIT_1__molecule_second;
  inducer_deg: Inducer => ; kf_inducer_deg*Inducer;
    kf_inducer_deg = 0.000333 MWDERIVEDUNIT_1__second;
  // 0.156 molecule/second correcsponds to 1ng/ml of extracellular dox , with a nucleus volume of 690 um^3
  influx: => Inducer; kf_influx;
    kf_influx = 0.078 MWDERIVEDUNIT_molecule__second;
  mRNA_deg: mRNA => ; kf_mRNA_deg*mRNA;
    kf_mRNA_deg = 0.000288 MWDERIVEDUNIT_1__second;
  RISC_complex_deformation: mRNA_miRNA_RISC => mRNA + microRNA_RISC; kf_RISC_complex_deformation*mRNA_miRNA_RISC;
    kf_RISC_complex_deformation = 0.303 MWDERIVEDUNIT_1__second;
  miRNA_RISC_dissociation: microRNA_RISC => RISC; kf_RISC_deg*microRNA_RISC;
    kf_RISC_deg = 2.16e-5 MWDERIVEDUNIT_1__second;
  slicer: mRNA_miRNA_RISC => microRNA_RISC; kf_slicer*mRNA_miRNA_RISC;
    kf_slicer = 0.007 MWDERIVEDUNIT_1__second;
  TetR_deg: TetR => ; kf_TetR_deg*TetR;
    kf_TetR_deg = 9.67e-5 MWDERIVEDUNIT_1__second;
  on: gene_off => gene_on; kf_on*gene_off;
    kf_on = 0.00031 MWDERIVEDUNIT_1__second;
  off: gene_on => gene_off; kf_off*gene_on;
    kf_off = 0.000418 MWDERIVEDUNIT_1__second;
  Inducer_TetR_deg: Inducer_TetR => ; k_Inducer_TetR_deg*Inducer_TetR; Inducer_TetR_deg is "Inducer-TetR_deg";
    k_Inducer_TetR_deg = 9.67e-5 MWDERIVEDUNIT_1__second;
  mRNAmiRNA_deg: mRNAmiRNA => ; kf_mRNAmiRNA_deg*mRNAmiRNA;
    kf_mRNAmiRNA_deg = 0.000288 MWDERIVEDUNIT_1__second;
  RISC_complex_formation: mRNA + microRNA_RISC => mRNA_miRNA_RISC; kf_RISC_complex_formation*mRNA*microRNA_RISC;
    kf_RISC_complex_formation = 1.84e-6 MWDERIVEDUNIT_1__molecule_second;
  Inducer_dissociates_TetR: Inducer_TetR => TetR + Inducer; kf_inducer_dissociate_TetR*Inducer_TetR;
    kf_inducer_dissociate_TetR = 2e-8 MWDERIVEDUNIT_1__second;

  // Unit definitions:
  unit MWBUILTINUNIT_liter = metre^3 * 1e-3 dimensionless;
  unit MWBUILTINUNIT_molecule = 1.660539e-24 mole;
  unit MWDERIVEDUNIT_1__second = dimensionless / second; MWDERIVEDUNIT_1__second is "1/second";
  unit MWDERIVEDUNIT_1__molecule_second = 6.022142e23 dimensionless / (mole * second); MWDERIVEDUNIT_1__molecule_second is "1/(molecule*second)";
  unit MWDERIVEDUNIT_molecule__second = mole * 1.660539e-24 dimensionless / second; MWDERIVEDUNIT_molecule__second is "molecule/second";
end
