// SBML level 2 version 4

model Equalizer()
  // Equalizer

  // Compartments:
  compartment Cell = 4e-12 MWBUILTINUNIT_liter;

  // Species:
  substanceOnly species mRNAmicroRNA in Cell = 0;  // substance in MWBUILTINUNIT_molecule
  substanceOnly species gene3_on in Cell = 0;  // substance in MWBUILTINUNIT_molecule
  substanceOnly species TetR in Cell = 0;  // substance in MWBUILTINUNIT_molecule
  substanceOnly species pri_microRNA in Cell = 0;  // substance in MWBUILTINUNIT_molecule
  substanceOnly species pre_microRNA in Cell = 0;  // substance in MWBUILTINUNIT_molecule
  substanceOnly species mRNA3 in Cell = 0;  // substance in MWBUILTINUNIT_molecule
  substanceOnly species POI in Cell = 0;  // substance in MWBUILTINUNIT_molecule
  substanceOnly species microRNA in Cell = 0;  // substance in MWBUILTINUNIT_molecule
  substanceOnly species microRNA_RISC in Cell = 0; microRNA_RISC is "microRNA-RISC";  // substance in MWBUILTINUNIT_molecule
  substanceOnly species Inducer in Cell = 234;  // substance in MWBUILTINUNIT_molecule
  substanceOnly species Inducer_TetR in Cell = 0; Inducer_TetR is "Inducer-TetR";  // substance in MWBUILTINUNIT_molecule
  substanceOnly species mRNA1_microRNA_RISC in Cell = 0; mRNA1_microRNA_RISC is "mRNA1-microRNA-RISC";  // substance in MWBUILTINUNIT_molecule
  substanceOnly species RISC in Cell = 170000;  // substance in MWBUILTINUNIT_molecule
  substanceOnly species gene1_on in Cell = 0;  // substance in MWBUILTINUNIT_molecule
  substanceOnly species mRNA1 in Cell = 0;  // substance in MWBUILTINUNIT_molecule
  substanceOnly species mRNA2 in Cell = 0;  // substance in MWBUILTINUNIT_molecule
  substanceOnly species gene2_on in Cell = 0;  // substance in MWBUILTINUNIT_molecule
  substanceOnly species mRNA2_microRNA_RISC in Cell = 0; mRNA2_microRNA_RISC is "mRNA2-microRNA-RISC";  // substance in MWBUILTINUNIT_molecule
  substanceOnly species gene3_off in Cell = 10;  // substance in MWBUILTINUNIT_molecule
  substanceOnly species gene1_off in Cell = 10;  // substance in MWBUILTINUNIT_molecule
  substanceOnly species gene2_off in Cell = 10;  // substance in MWBUILTINUNIT_molecule

  // Parameters:
  n = 4 dimensionless;
  theta = 183 MWBUILTINUNIT_molecule;
  leakage = 0.25 dimensionless;
  kf_mRNA_deg = 0.000288 MWDERIVEDUNIT_1__second;
  kf = 0.00031 MWDERIVEDUNIT_1__second;
  kf_1 = 0.000418 MWDERIVEDUNIT_1__second;
  kf_2 = 0.00031 MWDERIVEDUNIT_1__second;
  kf_3 = 0.000418 MWDERIVEDUNIT_1__second;
  kf_4 = 0.00031 MWDERIVEDUNIT_1__second;
  kf_5 = 0.000418 MWDERIVEDUNIT_1__second;
  k_translation = 0.000333 MWDERIVEDUNIT_1__second;
  k_transcription = 0.037 MWDERIVEDUNIT_1__second;
  kf_6 = 0.007 MWDERIVEDUNIT_1__second;

  // Reactions:
  transcription3: gene3_on => mRNAmicroRNA + gene3_on; k_transcription*gene3_on*(theta^4/(theta^4 + TetR^4) + leakage)/(1 + leakage);
  splicing: mRNAmicroRNA => mRNA3 + pri_microRNA; kf_splicing*mRNAmicroRNA;
    kf_splicing = 0.002 MWDERIVEDUNIT_1__second;
  drosha: pri_microRNA => pre_microRNA; kf_drosha*pri_microRNA;
    kf_drosha = 0.01 MWDERIVEDUNIT_1__second;
  dicer: pre_microRNA => microRNA; kf_dicer*pre_microRNA;
    kf_dicer = 0.001 MWDERIVEDUNIT_1__second;
  microRNA_bind_RISC: microRNA + RISC => microRNA_RISC; kf_miRNA_bind_RISC*microRNA*RISC;
    kf_miRNA_bind_RISC = 1e-5 MWDERIVEDUNIT_1__second_molecule;
  microRNA_deg: microRNA => ; kf_miRNA_deg*microRNA;
    kf_miRNA_deg = 0.000288 MWDERIVEDUNIT_1__second;
  POI_deg: POI => ; kf_POI_deg*POI;
    kf_POI_deg = 9.67e-5 MWDERIVEDUNIT_1__second;
  // In Nevozhay(2009), a kf of 3.6nM^(-1)*h^(-1) is used,here unit conversion was done by assuming a nucleus volume of 690 um^3, and the conversion is also multiplied by 690/4000 since only this portion of the inducer is located within the nucleus.
  Inducer_bind_TetR: TetR + Inducer => Inducer_TetR; kf_Inducer_bindTetR*TetR*Inducer;
    kf_Inducer_bindTetR = 1e-5 MWDERIVEDUNIT_1__molecule_second;
  inducer_deg: Inducer => ; kf_inducer_deg*Inducer;
    kf_inducer_deg = 0.000333 MWDERIVEDUNIT_1__second;
  // 0.156 molecule/second correcsponds to 1ng/ml of extracellular dox , with a nucleus volume of 690 um^3
  influx: => Inducer; kf_influx;
    kf_influx = 0.078 MWDERIVEDUNIT_molecule__second;
  mRNA_deg: mRNA3 => ; kf_mRNA_deg*mRNA3;
  RISC_complex_deformation1: mRNA1_microRNA_RISC => mRNA1 + microRNA_RISC; kf_RISC_complex_deformation*mRNA1_microRNA_RISC;
    kf_RISC_complex_deformation = 0.303 MWDERIVEDUNIT_1__second;
  microRNA_RISC_dissociation: microRNA_RISC => RISC; kf_RISC_deg*microRNA_RISC;
    kf_RISC_deg = 2.16e-5 MWDERIVEDUNIT_1__second;
  slicer: mRNA1_microRNA_RISC => microRNA_RISC; kf_slicer*mRNA1_microRNA_RISC;
    kf_slicer = 0.007 MWDERIVEDUNIT_1__second;
  TetR_deg: TetR => ; kf_TetR_deg*TetR;
    kf_TetR_deg = 9.67e-5 MWDERIVEDUNIT_1__second;
  Inducer_TetR_deg: Inducer_TetR => ; k_Inducer_TetR_deg*Inducer_TetR; Inducer_TetR_deg is "Inducer-TetR_deg";
    k_Inducer_TetR_deg = 9.67e-5 MWDERIVEDUNIT_1__second;
  RISC_complex_formation: mRNA1 + microRNA_RISC => mRNA1_microRNA_RISC; kf_RISC_complex_formation*mRNA1*microRNA_RISC;
    kf_RISC_complex_formation = 1.84e-6 MWDERIVEDUNIT_1__molecule_second;
  Inducer_dissociates_TetR: Inducer_TetR => TetR + Inducer; kf_inducer_dissociate_TetR*Inducer_TetR;
    kf_inducer_dissociate_TetR = 2e-8 MWDERIVEDUNIT_1__second;
  mRNAmicroRNA_deg: mRNAmicroRNA => ; kf_mRNAmicroRNA_deg*mRNAmicroRNA;
    kf_mRNAmicroRNA_deg = 0.000288 MWDERIVEDUNIT_1__second;
  // k_transcription = 0.0467*4/5
  transcription1: gene1_on => mRNA1 + gene1_on; k_transcription*gene1_on*(theta^4/(theta^4 + TetR^4) + leakage)/(1 + leakage);
  mRNA1_deg: mRNA1 => ; kf_mRNA_deg*mRNA1;
  translation1: mRNA1 => TetR + mRNA1; k_translation*mRNA1;
  RISC_complex_deformation2: mRNA2_microRNA_RISC => mRNA2 + microRNA_RISC; RISC_complex_deformation2_kf*mRNA2_microRNA_RISC;
    RISC_complex_deformation2_kf = 0.303 MWDERIVEDUNIT_1__second;
  mRNA2_deg: mRNA2 => ; kf_mRNA_deg*mRNA2;
  transcription2: gene2_on => mRNA2 + gene2_on; k_transcription*gene2_on*(theta^4/(theta^4 + TetR^4) + leakage)/(1 + leakage);
  RISC_complex_formation2: mRNA2 + microRNA_RISC => mRNA2_microRNA_RISC; RISC_complex_formation2_kf*mRNA2*microRNA_RISC;
    RISC_complex_formation2_kf = 1.84e-6 MWDERIVEDUNIT_1__molecule_second;
  on_3: gene3_off => gene3_on; kf*gene3_off;
  off_3: gene3_on => gene3_off; kf_1*gene3_on;
  on_1: gene1_off => gene1_on; kf_2*gene1_off;
  off_1: gene1_on => gene1_off; kf_3*gene1_on;
  on_2: gene2_off => gene2_on; kf_4*gene2_off;
  off_2: gene2_on => gene2_off; kf_5*gene2_on;
  translation2: mRNA2 => POI + mRNA2; k_translation*mRNA2;
  Slicer_2: mRNA2_microRNA_RISC => microRNA_RISC; kf_6*mRNA2_microRNA_RISC;

  // Unit definitions:
  unit MWBUILTINUNIT_liter = metre^3 * 1e-3 dimensionless;
  unit MWBUILTINUNIT_molecule = 1.660539e-24 mole;
  unit MWDERIVEDUNIT_1__second = dimensionless / second; MWDERIVEDUNIT_1__second is "1/second";
  unit MWDERIVEDUNIT_1__second_molecule = 6.022142e23 dimensionless / (mole * second); MWDERIVEDUNIT_1__second_molecule is "1/(second*molecule)";
  unit MWDERIVEDUNIT_1__molecule_second = 6.022142e23 dimensionless / (mole * second); MWDERIVEDUNIT_1__molecule_second is "1/(molecule*second)";
  unit MWDERIVEDUNIT_molecule__second = mole * 1.660539e-24 dimensionless / second; MWDERIVEDUNIT_molecule__second is "molecule/second";
end
